# OpenSim document version 30000
Model Index6:
  length_units: meters
  force_units: N
  gravity: 0 -9.80665 0
  defaults: Millard2012AccelerationMuscle default
  BodySet:
    Body ground: mass=0 mass_center=(0 0 0) inertia_xx=0 inertia_yy=0 inertia_zz=0
    Body secondmc: mass=0.008834 mass_center=(0 -0.050924 0) inertia_xx=8e-6 inertia_yy=1e-6 inertia_zz=-8e-6
        meshes=2mc.vtp
      CustomJoint ground_secondmc: parent_body=ground location_in_parent=(0 0 0)
          orientation_in_parent=(-1.5707 0.15 1.4) location=(0 0 0)
        Coordinate secondmc_rx: motion_type=rotational default_value=0.5235988 range=(-3.14 3.14) clamped=true
        Coordinate secondmc_rz: motion_type=rotational default_value=-0.3839724 range=(-3.14 3.14) clamped=true
        Coordinate secondmc_ry: motion_type=rotational default_value=4.398229e-6 range=(-3.14 3.14) clamped=true
        Coordinate secondmc_tx: motion_type=translational default_value=0 range=(-5 5) clamped=true
        Coordinate secondmc_ty: motion_type=translational default_value=0 range=(-1 2) clamped=true
        Coordinate secondmc_tz: motion_type=translational default_value=0 range=(-3 3) clamped=true
        SpatialTransform:
          TransformAxis rotation1: coordinates=secondmc_rx axis=(1 0 0) LinearFunction(coefficients=1 0)
          TransformAxis rotation2: coordinates=secondmc_rz axis=(0 1 0) LinearFunction(coefficients=1 0)
          TransformAxis rotation3: coordinates=secondmc_ry axis=(0 0 1) LinearFunction(coefficients=1 0)
          TransformAxis translation1: coordinates=secondmc_tx axis=(1 0 0) LinearFunction(coefficients=1 0)
          TransformAxis translation2: coordinates=secondmc_ty axis=(0 1 0) LinearFunction(coefficients=1 0)
          TransformAxis translation3: coordinates=secondmc_tz axis=(0 0 1) LinearFunction(coefficients=1 0)
      WrapEllipsoid _2MCP_profundus: xyz_body_rotation=(0.91909 -1.41599 1.63433) translation=(0.0057 -0.0297 0)
          quadrant=-x dimensions=(0.007 0.007 0.03)
      WrapEllipsoid _2MCP_superficialis: xyz_body_rotation=(0.91909 -1.41599 1.63433) translation=(0.0057 -0.0297 0)
          quadrant=-x dimensions=(0.008 0.008 0.03)
    Body 2proxph: mass=0.00467295 mass_center=(0 -0.0202534 0) inertia_xx=1.052401e-6 inertia_yy=5.509437e-7
        inertia_zz=-1.052401e-6 meshes=2proxph.vtp
      CustomJoint 2MCP: parent_body=secondmc location_in_parent=(0.003501 -0.028243 0.00362) location=(0 0 0)
        Coordinate 2MCP_flexion: motion_type=rotational default_value=0 range=(-0.8726646 1.570796) clamped=true
        Coordinate 2MCP_abduction: motion_type=rotational default_value=0 range=(-0.2617994 0.2617994) clamped=true
        SpatialTransform: axes_held_at_zero=(rotation3 translation1 translation2 translation3)
          TransformAxis rotation1: coordinates=2MCP_flexion axis=(0.9975061 -0.03949601 0.05849401)
              LinearFunction(coefficients=1 0)
          TransformAxis rotation2: coordinates=2MCP_abduction axis=(-0.05499898 0.08589897 0.9947846)
              LinearFunction(coefficients=1 0)
      WrapEllipsoid MCP2_Extension: xyz_body_rotation=(0.947016 -1.41546 0.281347) translation=(0.0028 -0.0004 0.0025)
          dimensions=(0.0084 0.006 0.036)
      WrapTorus MCP2_Extension_FPI: xyz_body_rotation=(-1.5708 0 1.5708) translation=(-0.0074 -0.0024 -0.0084)
          quadrant=-x inner_radius=0.0036 outer_radius=0.006
      WrapTorus MCP2_Extension_FDI: xyz_body_rotation=(1.5708 0 1.5708) translation=(0.0096 -0.0024 -0.0073) quadrant=x
          inner_radius=0.003 outer_radius=0.0054
      WrapTorus MCP2_Extension_LUM: xyz_body_rotation=(1.5708 0 1.5708) translation=(0.0048 -0.0048 -0.0097) quadrant=x
          inner_radius=0.0036 outer_radius=0.006
    Body 2midph: mass=0.001226897 mass_center=(0 -0.0115986 0) inertia_xx=1.033927e-7 inertia_yy=8.092755e-8
        inertia_zz=-1.033927e-7 meshes=2midph.vtp
      CustomJoint 2PIP: parent_body=2proxph location_in_parent=(0.007517 -0.041273 0.007326) location=(0 0 0)
        Coordinate 2PIP_flexion: motion_type=rotational default_value=0 range=(-0.08726646 2.094395) clamped=true
        SpatialTransform: axes_held_at_zero=(rotation2 rotation3 translation1 translation2 translation3)
          TransformAxis rotation1: coordinates=2PIP_flexion axis=(0.9603449 0.040998 -0.275784)
              LinearFunction(coefficients=1 0)
      WrapTorus PIP2_Extension: xyz_body_rotation=(-1.5708 0 0.349066) translation=(0.0019 0.0007 0.0073) quadrant=y
          inner_radius=0.003 outer_radius=0.0048
      WrapTorus PIP2_Extension_UB: xyz_body_rotation=(-1.20428 0 1.91986) translation=(-0.0084 -0.0053 0.0074)
          quadrant=x inner_radius=0.003 outer_radius=0.0048
      WrapTorus PIP2_Extension_RB: xyz_body_rotation=(-1.51844 0 1.91986) translation=(0.0084 -0.004 0.0034) quadrant=x
          inner_radius=0.003 outer_radius=0.0048
    Body 2distph: mass=0.001141132 mass_center=(0 0 0) inertia_xx=2.278582e-7 inertia_yy=2.278582e-7
        inertia_zz=-7.877785e-8 meshes=2distph.vtp
      CustomJoint 2DIP: parent_body=2midph location_in_parent=(0.003333 -0.024888 0.00122) location=(0 0 0)
        Coordinate 2DIP_flexion: motion_type=rotational default_value=0 range=(-0.3490659 1.570796) clamped=true
        SpatialTransform: axes_held_at_zero=(rotation2 rotation3 translation1 translation2 translation3)
          TransformAxis rotation1: coordinates=2DIP_flexion axis=(0.9789773 0.07690602 -0.1889151)
              LinearFunction(coefficients=1 0)
      WrapTorus DIP2_Extension: xyz_body_rotation=(1.5708 0.0872665 0) translation=(0 -0.0002 0.0056) quadrant=-y
          inner_radius=0.003 outer_radius=0.0048
  ForceSet:
    Millard2012AccelerationMuscle [values shared by the 14 below unless stated]: max_contraction_velocity=10
        ignore_tendon_compliance=true default_activation=0.02
      MuscleFirstOrderActivationDynamicModel:
        activation_time_constant: 0.01 [seconds]
        deactivation_time_constant: 0.04 [seconds]
        minimum_activation: 0
      ActiveForceLengthCurve: min_norm_active_fiber_length=0.4441 transition_norm_fiber_length=0.73
          max_norm_active_fiber_length=1.8123 shallow_ascending_slope=0.8616 minimum_value=0
      ForceVelocityCurve: concentric_slope_at_vmax=0 concentric_slope_near_vmax=0.25 isometric_slope=5
          eccentric_slope_at_vmax=0 eccentric_slope_near_vmax=0.15 max_eccentric_velocity_force_multiplier=1.4
          concentric_curviness=0.6 eccentric_curviness=0.9
      FiberForceLengthCurve
      TendonForceLengthCurve
      FiberCompressiveForceLengthCurve
      FiberCompressiveForceCosPennationCurve
    Millard2012AccelerationMuscle FDSI: max_isometric_force=61.24 optimal_fiber_length=0.0835
        tendon_slack_length=0.2734 pennation_angle_at_optimal=0.1047198 [radians]
      PathPoint P1: secondmc (-0.04384 0.27799 -0.05373)
      PathPoint P2: secondmc (-0.01523 0.10844 -0.02684)
      PathPoint P3: secondmc (-0.00579 0.02396 -0.0189)
      PathPoint P4: secondmc (-0.00146 0.00481 -0.00946)
      PathPoint P5: secondmc (0.00294 -0.02059 -0.0107)
      PathPoint P6: 2proxph (0.0054 -0.03117 -0.00153)
      MovingPathPoint P7: 2midph x_coordinate=2PIP_flexion y_coordinate=2PIP_flexion z_coordinate=2PIP_flexion
          x_location=Constant(value=0.00122)
        y_location: SimmSpline: x=(-0.0872665 0.676315 1.33423 1.58701 1.94156)
            y=(-0.007533 -0.007587 -0.008196 -0.008744 -0.010949)
        z_location: SimmSpline: x=(0.039054 0.87359 1.21938 1.55556 1.87254)
            y=(-0.006591 -0.006507 -0.006168 -0.005274 -0.00447)
      PathPoint P8: 2midph (0.00258 -0.02023 -0.00072)
      PathWrap: wrap_object=_2MCP_superficialis method=hybrid range=(5 6)
    Millard2012AccelerationMuscle FDPI: max_isometric_force=68.27 optimal_fiber_length=0.0749
        tendon_slack_length=0.2912 pennation_angle_at_optimal=0.122173
      PathPoint P1: secondmc (-0.04355 0.27442 -0.04956)
      PathPoint P2: secondmc (-0.01588 0.10907 -0.02321)
      PathPoint P3: secondmc (-0.00573 0.02594 -0.01715)
      PathPoint P4: secondmc (-0.0012 0.00486 -0.00836)
      PathPoint P5: secondmc (0.00281 -0.02058 -0.00921)
      PathPoint P6: 2proxph (0.0054 -0.03143 -0.00223)
      MovingPathPoint P7: 2midph x_coordinate=2PIP_flexion y_coordinate=2PIP_flexion z_coordinate=2PIP_flexion
          x_location=Constant(value=0.00124)
        y_location: SimmSpline: x=(0.000201324 0.530839 1.40018 1.82921 2.16791)
            y=(-0.009101 -0.008878 -0.009164 -0.009897 -0.011839)
        z_location: SimmSpline: x=(-0.0183551 0.529577 1.20977 1.94664) y=(-0.006062 -0.006083 -0.005651 -0.003616)
      PathPoint P8: 2midph (0.00244 -0.0188 -0.00689)
      PathPoint P9: 2distph (0.00094 -0.00532 -0.00136)
      PathWrap: wrap_object=_2MCP_profundus method=hybrid range=(5 6)
    Millard2012AccelerationMuscle EDCI: max_isometric_force=6.09 optimal_fiber_length=0.07
        tendon_slack_length=0.3165947 pennation_angle_at_optimal=0.05235988
      PathPoint P1: secondmc (-0.04253 0.3076 -0.02137)
      PathPoint P2: secondmc (-0.0344 0.25549 -0.01753)
      PathPoint P3: secondmc (-0.02135 0.07153 0.0096)
      PathPoint P4: secondmc (0.002 -0.025 0.013)
      PathPoint P5: 2proxph (0.00145 -0.01057 0.00897)
      PathPoint P6: 2proxph (0.00771 -0.037 0.0118)
      PathPoint P7: 2midph (0.00109 -0.00885 0.00282)
      PathWrap: wrap_object=MCP2_Extension method=hybrid range=(4 5)
      PathWrap: wrap_object=PIP2_Extension range=(6 7)
    Millard2012AccelerationMuscle EIP: max_isometric_force=10.85 optimal_fiber_length=0.0589
        tendon_slack_length=0.1617876 pennation_angle_at_optimal=0.1047198
      PathPoint P1: secondmc (-0.04102 0.13966 -0.01554)
      PathPoint P2: secondmc (-0.03537 0.13149 -0.01187)
      PathPoint P3: secondmc (-0.02592 0.06684 0.00428)
      PathPoint P4: secondmc (-0.01081 0.01528 0.00681)
      PathPoint P5: secondmc (0.0013 -0.0252 0.013)
      PathPoint P6: 2proxph (0.0014 -0.0106 0.009)
      PathPoint P7: 2proxph (0.00771 -0.037 0.0118)
      PathPoint P8: 2midph (0.00109 -0.00885 0.00282)
      PathWrap: wrap_object=MCP2_Extension method=hybrid range=(5 6)
      PathWrap: wrap_object=PIP2_Extension range=(7 8)
    Millard2012AccelerationMuscle EIP_U: max_isometric_force=10.85 optimal_fiber_length=0.0589
        tendon_slack_length=0.1826105 pennation_angle_at_optimal=0.1047198
      PathPoint P1: secondmc (-0.04102 0.13966 -0.01554)
      PathPoint P2: secondmc (-0.03537 0.13149 -0.01187)
      PathPoint P3: secondmc (-0.02592 0.06684 0.00428)
      PathPoint P4: secondmc (-0.01081 0.01528 0.00681)
      PathPoint P5: secondmc (0.0013 -0.0252 0.013)
      PathPoint P6: 2proxph (0.0014 -0.0106 0.009)
      PathPoint P7: 2proxph (0.00069 -0.0415 0.0127)
      PathPoint P8: 2midph (-0.0051 -0.0094 0.004)
      PathPoint P9: 2midph (0.0026 -0.0196 0.0036)
      PathPoint P10: 2distph (0.0003 -0.0037 0.0023)
      PathWrap: wrap_object=MCP2_Extension method=hybrid range=(5 6)
      PathWrap: wrap_object=PIP2_Extension_UB range=(7 8)
      PathWrap: wrap_object=DIP2_Extension range=(9 10)
    Millard2012AccelerationMuscle EIP_R: max_isometric_force=10.85 optimal_fiber_length=0.0589
        tendon_slack_length=0.1825019 pennation_angle_at_optimal=0.1047198
      PathPoint P1: secondmc (-0.04102 0.13966 -0.01554)
      PathPoint P2: secondmc (-0.03537 0.13149 -0.01187)
      PathPoint P3: secondmc (-0.02592 0.06684 0.00428)
      PathPoint P4: secondmc (-0.01081 0.01528 0.00681)
      PathPoint P5: secondmc (0.0013 -0.0252 0.013)
      PathPoint P6: 2proxph (0.0014 -0.0106 0.009)
      PathPoint P7: 2proxph (0.01267 -0.04045 0.00868)
      PathPoint P8: 2midph (0.00654 -0.00824 0.00153)
      PathPoint P9: 2midph (0.0026 -0.0196 0.0036)
      PathPoint P10: 2distph (0.0003 -0.0037 0.0023)
      PathWrap: wrap_object=MCP2_Extension method=hybrid range=(5 6)
      PathWrap: wrap_object=PIP2_Extension_RB range=(7 8)
      PathWrap: wrap_object=DIP2_Extension range=(9 10)
    Millard2012AccelerationMuscle FPI_C: max_isometric_force=16.88 optimal_fiber_length=0.03056
        tendon_slack_length=0.05379163 pennation_angle_at_optimal=0.1291544
      PathPoint P1: secondmc (-0.00316 0.0003 -0.00018)
      PathPoint P2: secondmc (-0.00336 -0.02107 -0.0017)
      PathPoint P3: 2proxph (-0.005 -0.01183 0.00015)
      PathPoint P4: 2proxph (-0.0014 -0.0244 0.0065)
      PathPoint P5: 2proxph (0.00771 -0.037 0.0118)
      PathPoint P6: 2midph (0.00109 -0.00885 0.00282)
      PathWrap: wrap_object=MCP2_Extension_FPI range=(2 3)
      PathWrap: wrap_object=PIP2_Extension range=(5 6)
    Millard2012AccelerationMuscle FPI_T: max_isometric_force=16.88 optimal_fiber_length=0.0306
        tendon_slack_length=0.07262454 pennation_angle_at_optimal=0.1291544
      PathPoint P1: secondmc (-0.00316 0.0003 -0.00018)
      PathPoint P2: secondmc (-0.00336 -0.02107 -0.0017)
      PathPoint P3: 2proxph (-0.005 -0.01183 0.00015)
      PathPoint P4: 2proxph (0.00069 -0.0415 0.0127)
      PathPoint P5: 2midph (-0.0051 -0.0094 0.004)
      PathPoint P6: 2midph (0.0026 -0.0196 0.0036)
      PathPoint P7: 2distph (0.0003 -0.0037 0.0023)
      PathWrap: wrap_object=MCP2_Extension_FPI range=(2 3)
      PathWrap: wrap_object=PIP2_Extension_UB range=(4 5)
      PathWrap: wrap_object=DIP2_Extension range=(6 7)
    Millard2012AccelerationMuscle LUM_C: max_isometric_force=2.48 optimal_fiber_length=0.06799
        tendon_slack_length=0.03025628 pennation_angle_at_optimal=0.02094395
      MovingPathPoint P1: secondmc x_coordinate=2MCP_flexion y_coordinate=2MCP_flexion z_coordinate=2MCP_flexion
          x_location=Constant(value=-0.0012) z_location=Constant(value=-0.0084)
        y_location: SimmSpline: x=(-0.902568 0.00183719 1.82156) y=(0.008959 0.004897 0.001411)
      MovingPathPoint P2: secondmc x_coordinate=2MCP_flexion y_coordinate=2MCP_flexion z_coordinate=2MCP_flexion
          y_location=Constant(value=-0.01728) z_location=Constant(value=-0.0023)
        x_location: SimmSpline: x=(-0.808639 0.113257 1.60585) y=(0.007832 0.008116 0.012957)
      PathPoint P3: 2proxph (0.0065 -0.0093 -0.00315)
      PathPoint P4: 2proxph (0.0099 -0.02315 0.0049)
      PathPoint P5: 2proxph (0.00771 -0.037 0.0118)
      PathPoint P6: 2midph (0.00109 -0.00885 0.00282)
      PathWrap: wrap_object=MCP2_Extension_LUM range=(2 3)
      PathWrap: wrap_object=PIP2_Extension range=(5 6)
    Millard2012AccelerationMuscle LUM_T: max_isometric_force=2.48 optimal_fiber_length=0.06799
        tendon_slack_length=0.04885254 pennation_angle_at_optimal=0.02094395
      MovingPathPoint P1: secondmc x_coordinate=2MCP_flexion y_coordinate=2MCP_flexion z_coordinate=2MCP_flexion
          x_location=Constant(value=-0.0012) z_location=Constant(value=-0.0084)
        y_location: SimmSpline: x=(-0.902568 0.00183719 1.82156) y=(0.008959 0.004897 0.001411)
      MovingPathPoint P2: secondmc x_coordinate=2MCP_flexion y_coordinate=2MCP_flexion z_coordinate=2MCP_flexion
          y_location=Constant(value=-0.01728) z_location=Constant(value=-0.0023)
        x_location: SimmSpline: x=(-0.808639 0.113257 1.60585) y=(0.007832 0.008116 0.012957)
      PathPoint P3: 2proxph (0.0065 -0.0093 -0.00315)
      PathPoint P4: 2proxph (0.01267 -0.04045 0.00868)
      PathPoint P5: 2midph (0.00654 -0.00824 0.00153)
      PathPoint P6: 2midph (0.0026 -0.0196 0.0036)
      PathPoint P7: 2distph (0.0003 -0.0037 0.0023)
      PathWrap: wrap_object=MCP2_Extension_LUM range=(2 3)
      PathWrap: wrap_object=PIP2_Extension_RB range=(4 5)
      PathWrap: wrap_object=DIP2_Extension range=(6 7)
    Millard2012AccelerationMuscle EDCI_U: max_isometric_force=6.09 optimal_fiber_length=0.07
        tendon_slack_length=0.3379288 pennation_angle_at_optimal=0.05235988
      PathPoint P1: secondmc (-0.04253 0.3076 -0.02137)
      PathPoint P2: secondmc (-0.0344 0.25549 -0.01753)
      PathPoint P3: secondmc (-0.02135 0.07153 0.0096)
      PathPoint P4: secondmc (0.00227 -0.0252 0.013)
      PathPoint P5: 2proxph (0.00145 -0.01057 0.00897)
      PathPoint P6: 2proxph (0.00069 -0.0415 0.0127)
      PathPoint P7: 2midph (-0.0051 -0.0094 0.004)
      PathPoint P8: 2midph (0.0026 -0.0196 0.0036)
      PathPoint P9: 2distph (0.0003 -0.0037 0.0023)
      PathWrap: wrap_object=MCP2_Extension method=hybrid range=(4 5)
      PathWrap: wrap_object=PIP2_Extension_UB range=(6 7)
      PathWrap: wrap_object=DIP2_Extension range=(8 9)
    Millard2012AccelerationMuscle EDCI_R: max_isometric_force=6.09 optimal_fiber_length=0.07
        tendon_slack_length=0.3377779 pennation_angle_at_optimal=0.05235988
      PathPoint P1: secondmc (-0.04253 0.3076 -0.02137)
      PathPoint P2: secondmc (-0.0344 0.25549 -0.01753)
      PathPoint P3: secondmc (-0.02135 0.07153 0.0096)
      PathPoint P4: secondmc (0.00227 -0.0252 0.013)
      PathPoint P5: 2proxph (0.00145 -0.01057 0.00897)
      PathPoint P6: 2proxph (0.01267 -0.04045 0.00868)
      PathPoint P7: 2midph (0.00654 -0.00824 0.00153)
      PathPoint P8: 2midph (0.0026 -0.0196 0.0036)
      PathPoint P9: 2distph (0.0003 -0.0037 0.0023)
      PathWrap: wrap_object=MCP2_Extension method=hybrid range=(4 5)
      PathWrap: wrap_object=PIP2_Extension_RB range=(6 7)
      PathWrap: wrap_object=DIP2_Extension range=(8 9)
    Millard2012AccelerationMuscle FDI_2: max_isometric_force=33.75 optimal_fiber_length=0.0389
        tendon_slack_length=0.06467119 pennation_angle_at_optimal=0.1605703
      PathPoint P1: secondmc (0.0055 0.00018 -0.00056)
      MovingPathPoint P2: secondmc x_coordinate=2MCP_flexion y_coordinate=2MCP_flexion z_coordinate=2MCP_flexion
        x_location: SimmSpline: x=(-0.808639 0.113257 1.60585) y=(0.007832 0.008116 0.012957)
        y_location: SimmSpline: x=(-0.959931 -0.286733 -0.003922 1.62926) y=(-0.017291 -0.017309 -0.017354 -0.021219)
        z_location: SimmSpline: x=(-0.797865 -0.211933 0.0623332 1.39867) y=(-0.002291 -0.002296 -0.002296 -0.000788)
      PathPoint P3: 2proxph (0.00658 -0.0072 -0.0032)
      PathPoint P4: 2proxph (0.01267 -0.04045 0.00868)
      PathPoint P5: 2midph (0.00654 -0.00824 0.00153)
      PathWrap: wrap_object=MCP2_Extension_FDI range=(2 3)
      PathWrap: wrap_object=PIP2_Extension_RB range=(4 5)
      PathWrap: wrap_object=DIP2_Extension range=(5 5)
    Millard2012AccelerationMuscle FDI_1: max_isometric_force=33.75 optimal_fiber_length=0.0389
        tendon_slack_length=0.08522137 pennation_angle_at_optimal=0.1605703
      PathPoint P1: secondmc (0.01011 0.02055 -0.01437)
      MovingPathPoint P2: secondmc x_coordinate=2MCP_flexion y_coordinate=2MCP_flexion z_coordinate=2MCP_flexion
        x_location: SimmSpline: x=(-0.808639 0.113257 1.60585) y=(0.007832 0.008116 0.012957)
        y_location: SimmSpline: x=(-0.959931 -0.286733 -0.003922 1.62926) y=(-0.017291 -0.017309 -0.017354 -0.021219)
        z_location: SimmSpline: x=(-0.797865 -0.211933 0.0623332 1.39867) y=(-0.002291 -0.002296 -0.002296 -0.000788)
      PathPoint P3: 2proxph (0.00658 -0.0072 -0.0032)
      PathPoint P4: 2proxph (0.01267 -0.04045 0.00868)
      PathPoint P5: 2midph (0.00654 -0.00824 0.00153)
      PathPoint P6: 2midph (0.0026 -0.0196 0.0036)
      PathPoint P7: 2distph (0.0003 -0.0037 0.0023)
      PathWrap: wrap_object=MCP2_Extension_FDI range=(2 3)
      PathWrap: wrap_object=PIP2_Extension_RB range=(4 5)
      PathWrap: wrap_object=DIP2_Extension range=(6 7)
    ObjectGroup forearm: members=(EDCI EDCI_R EDCI_U EIP EIP_R EIP_U FDPI FDSI)
    ObjectGroup radial: members=(EDCI EDCI_R EDCI_U EIP EIP_R EIP_U FDPI FDSI)
    ObjectGroup flexor: members=(FDPI FDSI)
    ObjectGroup hand: members=(EDCI EDCI_R EDCI_U EIP EIP_R EIP_U FDPI FDSI)
    ObjectGroup Index: members=(EDCI EDCI_R EDCI_U EIP EIP_R EIP_U FDI_1 FDI_2 FDPI FDSI FPI_C FPI_T LUM_C LUM_T)
    ObjectGroup extensor: members=(EDCI EDCI_R EDCI_U EIP EIP_R EIP_U)
  MarkerSet:
    Marker Tip: 2distph (0.00528743 -0.0247714 0.00335688)
    Marker DIP: 2midph (0.00373395 -0.0267571 0.00626493)
    Marker PIP: 2proxph (0.00867472 -0.0435435 0.0141022)
    Marker MCP: secondmc (0.00500563 -0.0310133 0.0133055)
    Marker Wrist: secondmc (-0.0115002 0.0500761 0.00697853)
    Marker DT1: 2distph (0.00517497 -0.0169534 0.00717224)
    Marker DT2: 2distph (0.00621186 -0.00693341 0.00695332)
    Marker DT3: 2distph (-0.00269352 -0.00741121 0.00765624)
    Marker DT4: 2distph (-0.0021204 -0.0149428 0.00927895)
    Marker IT1: 2midph (0.0078856 -0.023039 0.00825545)
    Marker IT2: 2midph (0.0080072 -0.0102813 0.00698703)
    Marker IT3: 2midph (-0.00225807 -0.0110167 0.00939453)
    Marker IT4: 2midph (0.00410221 -0.0156925 0.015684)
    Marker PT1: 2proxph (0.00817704 -0.0336374 0.0150833)
    Marker PT2: 2proxph (0.0102731 -0.0161604 0.00964884)
    Marker PT3: 2proxph (0.00125119 -0.0166646 0.0133088)
    Marker PT4: 2proxph (0.00795347 -0.022085 0.0201033)
    Marker ML1: secondmc (0.00580932 -0.00626373 0.0135728)
    Marker ML2: secondmc (0.0096375 0.0135762 0.011799)
    Marker ML3: secondmc (-0.00223616 0.00864386 0.0128805)
    Marker ML4: secondmc (0.00674461 0.00525294 0.0179464)
