# OpenSim document version 30000
ForceSet Index6_Actuators:
  defaults: CoordinateActuator default: isDisabled=true optimal_force=1000
  # Reserve Motors to assist muscles
  CoordinateActuator 2MCP_flexion_reserve: isDisabled=False coordinate=2MCP_flexion optimal_force=2
  CoordinateActuator 2MCP_abduction_reserve: isDisabled=False coordinate=2MCP_abduction optimal_force=1
  CoordinateActuator 2PIP_flexion_reserve: isDisabled=False coordinate=2PIP_flexion optimal_force=1.5
  CoordinateActuator 2DIP_flexion_reserve: isDisabled=False coordinate=2DIP_flexion optimal_force=0.5
  CoordinateActuator secondmc_rx_reserve: min_control=-0.1 max_control=0.1 coordinate=secondmc_rx optimal_force=100000
  CoordinateActuator secondmc_rz_reserve: min_control=-0.1 max_control=0.1 coordinate=secondmc_rz optimal_force=100000
  CoordinateActuator secondmc_ry_reserve: min_control=-0.1 max_control=0.1 coordinate=secondmc_ry optimal_force=100000
  PointActuator secondmc_tx_residual: min_control=-0.1 max_control=0.1 body=secondmc point=(0 0 0)
      point_is_global=false direction=(1 0 0) force_is_global=true optimal_force=100000
  PointActuator secondmc_ty_residual: min_control=-0.1 max_control=0.1 body=secondmc point=(0 0 0)
      point_is_global=false direction=(0 1 0) force_is_global=true optimal_force=100000
  PointActuator secondmc_tz_residual: min_control=-0.1 max_control=0.1 body=secondmc point=(0 0 0)
      point_is_global=false direction=(0 0 1) force_is_global=true optimal_force=100000
