# OpenSim document version 30000
AnalyzeTool IndexSample:
  model_file: Index6_Original.osim
  replace_force_set: false
  force_set_files: Index6_Actuators.xml
  results_directory: Results
  output_precision: 8
  initial_time: 0
  final_time: 0.5
  solve_for_equilibrium_for_auxiliary_states: true
  maximum_number_of_integrator_steps: 20000
  maximum_integrator_step_size: 1
  minimum_integrator_step_size: 1e-8
  integrator_error_tolerance: 1e-5
  external_loads_file: Sample_GRF_Setup.xml
  coordinates_file: Sample_IK.mot
  lowpass_cutoff_frequency_for_coordinates: -1
  AnalysisSet Analyses:
    EMGStaticOptimization EMGSO_0: start_time=0 end_time=0.5 step_interval=1 in_degrees=true EMG_file=Sample_EMG.sto
        EMG_control_range=0.15 use_model_force_set=true activation_exponent=2 use_muscle_physiology=true
        optimizer_convergence_criterion=0.0001 optimizer_max_iterations=100 objective_function=0
        objective_actuator_names=None default_objective_actuator_scalar=0 variance_exponent=2 group_weight=0.5
    EMGStaticOptimization EMGSO_1: start_time=0 end_time=0.5 step_interval=1 in_degrees=true EMG_file=Sample_EMG.sto
        EMG_control_range=0.15 use_model_force_set=true activation_exponent=2 use_muscle_physiology=true
        optimizer_convergence_criterion=0.0001 optimizer_max_iterations=100 objective_function=1
        objective_actuator_names=None default_objective_actuator_scalar=0.7 variance_exponent=2 group_weight=0.5
    EMGStaticOptimization EMGSO_2: start_time=0 end_time=0.5 step_interval=1 in_degrees=true EMG_file=Sample_EMG.sto
        EMG_control_range=0.15 use_model_force_set=true activation_exponent=2 use_muscle_physiology=true
        optimizer_convergence_criterion=0.0001 optimizer_max_iterations=100 objective_function=2
        objective_actuator_names=None default_objective_actuator_scalar=0.2 variance_exponent=2 group_weight=0.5
